// SBML level 2 version 4

model H2O2StressDC()
  // H2O2StressDC

  // Compartments:
  compartment unnamed = 1;

  // Species:
  species G6P in unnamed = 1.1417/unnamed;
  species F6P in unnamed = 0.3092/unnamed;
  species FBP in unnamed = 1.2067/unnamed;
  species DHAP in unnamed = 0.5459/unnamed;
  species SixPG in unnamed = 0.172/unnamed;
  species PEP in unnamed = 0.0565/unnamed;
  species PYR in unnamed = 1.944126/unnamed;
  species P5P in unnamed = 0.4727/unnamed;
  species E4P in unnamed = 1.918617/unnamed;
  species S7P in unnamed = 0.1252/unnamed;
  species NADPH in unnamed = 0.1436838/unnamed;
  species ROS in unnamed = 1/unnamed;

  // Parameters:
  a1 = 0;
  a2 = 0;
  a3 = 0;
  a4 = 0;
  a5 = 0;
  a6 = 0;
  a7 = 0;
  a8 = 0;
  a9 = 0;
  a10 = 0;
  a11 = 0;
  a12 = 0;
  a13 = 0;
  a14 = 0;
  a15 = 0;
  a16 = 0;
  a17 = 0;
  a18 = 0;
  a19 = 0;
  a20 = 0;
  a21 = 0;
  a22 = 0;
  a23 = 0;
  a24 = 0;
  a25 = 0;
  a26 = 0;
  a27 = 0;
  a28 = 0;
  a29 = 0;
  a30 = 0;
  a31 = 0;
  a32 = 0;
  a33 = 0;
  a34 = 0;
  a35 = 0;
  a36 = 0;
  a37 = 0;
  a38 = 0;
  a39 = 0;
  a40 = 0;
  a41 = 0;
  a42 = 0;
  a43 = 0;
  a44 = 0;
  a45 = 0;
  a46 = 0;
  a47 = 0;
  a48 = 0;
  a49 = 0;
  a50 = 0;
  a51 = 0;
  a52 = 0;
  a53 = 0;
  a54 = 0;
  a55 = 0;
  a56 = 0;
  a57 = 0;
  a58 = 0;
  a59 = 0;
  a60 = 0;
  a61 = 0;
  a62 = 0;
  a63 = 0;
  a64 = 0;
  a65 = 0;
  a66 = 0;
  a67 = 0;
  a68 = 0;
  a69 = 0;
  a70 = 0;
  a71 = 0;
  a72 = 0;
  a73 = 0;
  a74 = 0;
  a75 = 0;
  a76 = 0;
  a77 = 0;
  a78 = 0;
  a79 = 0;
  a80 = 0;
  a81 = 0;
  a82 = 0;
  a83 = 0;
  a84 = 0;
  a85 = 0;
  a86 = 0;
  a87 = 0;
  a88 = 0;
  a89 = 0;
  a90 = 0;
  a91 = 0;
  a92 = 0;
  a93 = 0;
  a94 = 0;
  a95 = 0;
  a96 = 0;
  a97 = 0;
  a98 = 0;
  a99 = 0;
  a100 = 0;
  a101 = 0;
  a102 = 0;
  a103 = 0;
  a104 = 0;
  a105 = 0;
  a106 = 0;
  a107 = 0;
  a108 = 0;
  a109 = 0;
  a110 = 0;
  a111 = 0;
  a112 = 0;
  a113 = 0;
  a114 = 0;
  a115 = 0;
  a116 = 0;
  a117 = 0;
  a118 = 0;
  a119 = 0;
  a120 = 0;
  a121 = 0;
  a122 = 0;
  a123 = 0;
  a124 = 0;
  a125 = 0;
  a126 = 0;
  a127 = 0;
  a128 = 0;
  a129 = 0;
  a130 = 0;
  a131 = 0;
  a132 = 0;
  a133 = 0;
  a134 = 0;
  a135 = 0;
  a136 = 0;
  a137 = 0;
  a138 = 0;
  a139 = 0;
  a140 = 0;
  a141 = 0;
  a142 = 0;
  a143 = 0;
  a144 = 0;
  a145 = 0;
  a146 = 0;
  a147 = 0;
  a148 = 0;
  a149 = 0;
  a150 = 0;
  a151 = 0;
  a152 = 0;
  a153 = 0;
  a154 = 0;
  a155 = 0;
  a156 = 0;
  a157 = 0;
  a158 = 0;
  a159 = 0;
  a160 = 0;
  a161 = 0;
  a162 = 0;
  GlcEX = 1;
  Vmax1 = 1.179292;
  Vmax2 = 5.021301;
  f6p = 0.3092; f6p is "f6p_";
  Km2 = 4.141167;
  Vmax3 = 0.1209989;
  Km3 = 0.09947963;
  fbp = 1.2067; fbp is "fbp_";
  Vmax4 = 3.836022;
  Km4 = 7.80864;
  g6p = 1.1417; g6p is "g6p_";
  nadph = 0.1436838; nadph is "nadph_";
  Vmax5 = 2.461701;
  Km5 = 4.652793;
  sixpg = 0.172; sixpg is "sixpg_";
  Vmax6 = 24.48955;
  Km6 = 43.90919;
  pep = 0.0565; pep is "pep_";
  p5p = 0.4727; p5p is "p5p_";
  Vmax7 = 0.349251;
  pyr = 1.944126; pyr is "pyr_";
  Km7 = 0.3416613;
  Vmax8 = 4.539523;
  Km8 = 2.119947;
  Vmax9 = 7.954952;
  Km9 = 26.91209;
  Vmax10 = 1.161549;
  Vmax11 = 0.4270326;
  Vmax12 = 8.884873;
  Vmax13 = 8.018239;
  dhap = 0.5459; dhap is "dhap_";
  Vmax14 = 6.247798;
  alpha_ros = 0.5675454;
  Vmax15 = 4.507797;
  Vmax16 = 0.2292741;
  Vmax17 = 0.1038883;
  s7p = 0.1252; s7p is "s7p_";
  Vmax18 = 0.007031104;
  e4p = 1.918617; e4p is "e4p_";
  Vmax19 = 0.0002987738;
  Vmax20 = 0.1299484;
  Vmax21 = 0.00456268;
  Vmax22 = 0.1186534;
  Vmax23 = 0.1779802;
  Vmax24 = 0.870968;
  Vmax25 = 0;
  Vmax26 = 0.1103292;
  stressFlag = 0;

  // Reactions:
  PTSg_Glucose_uptake: PEP => G6P + PYR; Vmax1*(G6P/g6p)^a1*(FBP/fbp)^a2*(SixPG/sixpg)^a3*(PEP/pep)^a4*(PYR/pyr)^a5*(P5P/p5p)^a6*(E4P/e4p)^a7*(S7P/s7p)^a8*(NADPH/nadph)^a9*(G6P/g6p)^(-1*a10)*(FBP/fbp)^(-1*a11)*(SixPG/sixpg)^(-1*a12)*(PEP/pep)^(-1*a13)*(PYR/pyr)^(-1*a14)*(P5P/p5p)^(-1*a15)*(E4P/e4p)^(-1*a16)*(S7P/s7p)^(-1*a17)*(NADPH/nadph)^(-1*a18)*GlcEX/(GlcEX + 0.22/27.7); PTSg_Glucose_uptake is "(PTSg) Glucose uptake";
  PFK_F6P_to_FBP: F6P => FBP; Vmax2*(G6P/g6p)^a19*(FBP/fbp)^a20*(SixPG/sixpg)^a21*(PEP/pep)^a22*(PYR/pyr)^a23*(P5P/p5p)^a24*(E4P/e4p)^a25*(S7P/s7p)^a26*(NADPH/nadph)^a27*(G6P/g6p)^(-1*a28)*(FBP/fbp)^(-1*a29)*(SixPG/sixpg)^(-1*a30)*(PEP/pep)^(-1*a31)*(PYR/pyr)^(-1*a32)*(P5P/p5p)^(-1*a33)*(E4P/e4p)^(-1*a34)*(S7P/s7p)^(-1*a35)*(NADPH/nadph)^(-1*a36)*(F6P/0.3092)/(F6P/0.3092 + Km2); PFK_F6P_to_FBP is "(PFK) F6P to FBP";
  FBPase_FBP_to_F6P: FBP => F6P; Vmax3*(G6P/g6p)^a37*(FBP/fbp)^a38*(SixPG/sixpg)^a39*(PEP/pep)^a40*(PYR/pyr)^a41*(P5P/p5p)^a42*(E4P/e4p)^a43*(S7P/s7p)^a44*(NADPH/nadph)^a45*(G6P/g6p)^(-1*a46)*(FBP/fbp)^(-1*a47)*(SixPG/sixpg)^(-1*a48)*(PEP/pep)^(-1*a49)*(PYR/pyr)^(-1*a50)*(P5P/p5p)^(-1*a51)*(E4P/e4p)^(-1*a52)*(S7P/s7p)^(-1*a53)*(NADPH/nadph)^(-1*a54)*(FBP/fbp)/(FBP/fbp + Km3); FBPase_FBP_to_F6P is "(FBPase) FBP to F6P";
  G6PDH_G6P_to_SixPG: G6P => SixPG + NADPH; Vmax4*(G6P/g6p)^a55*(FBP/fbp)^a56*(SixPG/sixpg)^a57*(PEP/pep)^a58*(PYR/pyr)^a59*(P5P/p5p)^a60*(E4P/e4p)^a61*(S7P/s7p)^a62*(NADPH/nadph)^a63*(G6P/g6p)^(-1*a64)*(FBP/fbp)^(-1*a65)*(SixPG/sixpg)^(-1*a66)*(PEP/pep)^(-1*a67)*(PYR/pyr)^(-1*a68)*(P5P/p5p)^(-1*a69)*(E4P/e4p)^(-1*a70)*(S7P/s7p)^(-1*a71)*(NADPH/nadph)^(-1*a72)*(G6P/g6p)/(G6P/g6p + Km4); G6PDH_G6P_to_SixPG is "(G6PDH) G6P to SixPG";
  GND_6PG_to_P5P: SixPG => P5P + NADPH; Vmax5*(G6P/g6p)^a73*(FBP/fbp)^a74*(SixPG/sixpg)^a75*(PEP/pep)^a76*(PYR/pyr)^a77*(P5P/p5p)^a78*(E4P/e4p)^a79*(S7P/s7p)^a80*(NADPH/nadph)^a81*(G6P/g6p)^(-1*a82)*(FBP/fbp)^(-1*a83)*(SixPG/sixpg)^(-1*a84)*(PEP/pep)^(-1*a85)*(PYR/pyr)^(-1*a86)*(P5P/p5p)^(-1*a87)*(E4P/e4p)^(-1*a88)*(S7P/s7p)^(-1*a89)*(NADPH/nadph)^(-1*a90)*(SixPG/sixpg)/(SixPG/sixpg + Km5); GND_6PG_to_P5P is "(GND) 6PG to P5P";
  PYK_PEP_to_PYR: PEP => PYR; Vmax6*(G6P/g6p)^a91*(FBP/fbp)^a92*(SixPG/sixpg)^a93*(PEP/pep)^a94*(PYR/pyr)^a95*(P5P/p5p)^a96*(E4P/e4p)^a97*(S7P/s7p)^a98*(NADPH/nadph)^a99*(G6P/g6p)^(-1*a100)*(FBP/fbp)^(-1*a101)*(SixPG/sixpg)^(-1*a102)*(PEP/pep)^(-1*a103)*(PYR/pyr)^(-1*a104)*(P5P/p5p)^(-1*a105)*(E4P/e4p)^(-1*a106)*(S7P/s7p)^(-1*a107)*(NADPH/nadph)^(-1*a108)*(PEP/pep)/(PEP/pep + Km6); PYK_PEP_to_PYR is "(PYK) PEP to PYR";
  PPS_PYR_to_PEP: PYR => PEP; Vmax7*(G6P/g6p)^a109*(FBP/fbp)^a110*(SixPG/sixpg)^a111*(PEP/pep)^a112*(PYR/pyr)^a113*(P5P/p5p)^a114*(E4P/e4p)^a115*(S7P/s7p)^a116*(NADPH/nadph)^a117*(G6P/g6p)^(-1*a118)*(FBP/fbp)^(-1*a119)*(SixPG/sixpg)^(-1*a120)*(PEP/pep)^(-1*a121)*(PYR/pyr)^(-1*a122)*(P5P/p5p)^(-1*a123)*(E4P/e4p)^(-1*a124)*(S7P/s7p)^(-1*a125)*(NADPH/nadph)^(-1*a126)*(PYR/pyr)/(PYR/pyr + Km7); PPS_PYR_to_PEP is "(PPS) PYR to PEP";
  PDH_Pyr_to_null: PYR => ; Vmax8*(G6P/g6p)^a127*(FBP/fbp)^a128*(SixPG/sixpg)^a129*(PEP/pep)^a130*(PYR/pyr)^a131*(P5P/p5p)^a132*(E4P/e4p)^a133*(S7P/s7p)^a134*(NADPH/nadph)^a135*(G6P/g6p)^(-1*a136)*(FBP/fbp)^(-1*a137)*(SixPG/sixpg)^(-1*a138)*(PEP/pep)^(-1*a139)*(PYR/pyr)^(-1*a140)*(P5P/p5p)^(-1*a141)*(E4P/e4p)^(-1*a142)*(S7P/s7p)^(-1*a143)*(NADPH/nadph)^(-1*a144)*(PYR/pyr)/(PYR/pyr + Km8); PDH_Pyr_to_null is "(PDH) Pyr to null";
  PPC_PEP_to_null: PEP => ; Vmax9*(G6P/g6p)^a145*(FBP/fbp)^a146*(SixPG/sixpg)^a147*(PEP/pep)^a148*(PYR/pyr)^a149*(P5P/p5p)^a150*(E4P/e4p)^a151*(S7P/s7p)^a152*(NADPH/nadph)^a153*(G6P/g6p)^(-1*a154)*(FBP/fbp)^(-1*a155)*(SixPG/sixpg)^(-1*a156)*(PEP/pep)^(-1*a157)*(PYR/pyr)^(-1*a158)*(P5P/p5p)^(-1*a159)*(E4P/e4p)^(-1*a160)*(S7P/s7p)^(-1*a161)*(NADPH/nadph)^(-1*a162)*(PEP/pep)/(PEP/pep + Km9); PPC_PEP_to_null is "(PPC) PEP to null";
  PGI_G6P_to_F6P: G6P => F6P; Vmax10*(G6P/g6p); PGI_G6P_to_F6P is "(PGI+) G6P to F6P";
  PGI_F6P_to_G6P: F6P => G6P; Vmax11*(F6P/f6p); PGI_F6P_to_G6P is "(PGI-) F6P to G6P";
  ALD_FBP_to_2DHAP: FBP => 2 DHAP; Vmax12*(FBP/fbp); ALD_FBP_to_2DHAP is "(ALD+) FBP to 2DHAP";
  ALD_2DHAP_to_FBP: 2 DHAP => FBP; Vmax13*(DHAP/dhap)*(DHAP/dhap); ALD_2DHAP_to_FBP is "(ALD-)2DHAP to FBP";
  ENO_DHAP_to_PEP: DHAP => PEP; Vmax14*ROS^(-alpha_ros)*(DHAP/dhap); ENO_DHAP_to_PEP is "(ENO+) DHAP to PEP";
  ENO_PEP_to_DHAP: PEP => DHAP; Vmax15*ROS^(-alpha_ros)*(PEP/pep); ENO_PEP_to_DHAP is "(ENO-) PEP to DHAP";
  tktA_P5P_to_DHAP_S7P: 2 P5P => DHAP + S7P; Vmax16*(P5P/p5p); tktA_P5P_to_DHAP_S7P is "(tktA+) P5P to DHAP + S7P";
  tktA_DHAP_S7P_to_P5P: DHAP + S7P => 2 P5P; Vmax17*(DHAP/dhap)*(S7P/s7p); tktA_DHAP_S7P_to_P5P is "(tktA-) DHAP + S7P to P5P";
  tktB_P5P_E4P_to_DHAP_F6P: P5P + E4P => DHAP + F6P; Vmax18*(P5P/p5p)*(E4P/e4p); tktB_P5P_E4P_to_DHAP_F6P is "(tktB+) P5P + E4P to DHAP + F6P";
  tktB_DHAP_F6P_to_P5P_E4P: DHAP + F6P => P5P + E4P; Vmax19*(DHAP/dhap)*(F6P/f6p); tktB_DHAP_F6P_to_P5P_E4P is "(tktB-) DHAP + F6P to P5P + E4P";
  tal_DHAP_S7P_to_F6P_E4P: DHAP + S7P => F6P + E4P; Vmax20*(DHAP/dhap)*(S7P/s7p); tal_DHAP_S7P_to_F6P_E4P is "(tal+) DHAP + S7P to F6P + E4P";
  tal_F6P_E4P_to_DHAP_S7P: F6P + E4P => DHAP + S7P; Vmax21*(F6P/f6p)*(E4P/e4p); tal_F6P_E4P_to_DHAP_S7P is "(tal-) F6P + E4P to DHAP + S7P";
  e4p_drain_E4P_to_null: E4P => ; Vmax22*(E4P/e4p); e4p_drain_E4P_to_null is "(e4p drain) E4P to null";
  p5p_drain_P5P_to_null: P5P => ; Vmax23*(P5P/p5p); p5p_drain_P5P_to_null is "(p5p drain) P5P to null";
  NADPH_drain_NADPH_to_null: NADPH => ; Vmax24*NADPH/nadph; NADPH_drain_NADPH_to_null is "(NADPH drain) NADPH to null";
  ROS_gen_null_to_ROS: => ROS; Vmax25; ROS_gen_null_to_ROS is "(ROS gen) null to ROS";
  ROS_scavenging_ROS_NADPH_to_null: ROS + NADPH => ; Vmax26*ROS*stressFlag; ROS_scavenging_ROS_NADPH_to_null is "(ROS scavenging) ROS + NADPH to null";

  // Events:
  event_250: at (time >= 100): stressFlag = 1;
  event_251: at (time >= 100): Vmax25 = 7.584415e-1;
end
